*Heading
 Job simulates a loaded cantilever beam
** Job name: CantileverBeamJob Model name: Cantilever Beam
** Generated by: Abaqus/CAE Learning Edition 2022
*Preprint, echo=NO, model=NO, history=NO, contact=NO
**
** PARTS
**
*Part, name=Beam
*Node
      1,  0.100000001, -0.100000001,           5.
      2,  0.100000001,           0.,           5.
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*Element, type=C3D8R
  1, 154, 155, 158, 157,   1,   2,   5,   4
  2, 155, 156, 159, 158,   2,   3,   6,   5
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*Nset, nset=Set-1, generate
   1,  459,    1
*Elset, elset=Set-1, generate
   1,  200,    1
** Section: Beam-Section
*Solid Section, elset=Set-1, material="AISI 1005 Steel"
,
*End Part
**
**
** ASSEMBLY
**
*Assembly, name=Assembly
**
*Instance, name="Beam Instance", part=Beam
*End Instance
**
*Nset, nset=Set-1, instance="Beam Instance"
   1,   2,   3, 154, 155, 156, 307, 308, 309
*Elset, elset=Set-1, instance="Beam Instance"
   1,   2, 101, 102
*Elset, elset=_Surf-1_S4, internal, instance="Beam Instance", generate
   2,  200,    2
*Surface, type=ELEMENT, name=Surf-1
_Surf-1_S4, S4
*End Assembly
**
** MATERIALS
**
*Material, name="AISI 1005 Steel"
*Density
7872.,
*Elastic
 2e+11, 0.29
**
** BOUNDARY CONDITIONS
**
** Name: Encastre one end Type: Symmetry/Antisymmetry/Encastre
*Boundary
Set-1, ENCASTRE
** ----------------------------------------------------------------
**
** STEP: Apply load
**
*Step, name="Apply load", nlgeom=NO
Load is applied during this step
*Static
1., 1., 1e-05, 1.
**
** LOADS
**
** Name: Uniform applied pressure   Type: Pressure
*Dsload
Surf-1, P, 10.
**
** OUTPUT REQUESTS
**
*Restart, write, frequency=0
**
** FIELD OUTPUT: Selected FIeld Outputs
**
*Output, field
*Node Output
CF, RF, U
*Element Output, directions=YES
PEMAG, S
**
** HISTORY OUTPUT: Deafult History Outputs
**
*Output, history, variable=PRESELECT
*End Step
